<Lems>

    <Target component="sim_c302_A_Muscles" />

    <Include file="Cells.xml" />
    <Include file="Networks.xml" />
    <Include file="Simulation.xml" />

    <Include file="c302_A_Muscles.net.nml" />

    <Simulation id="sim_c302_A_Muscles" length="0.1s" step="0.05ms" target="c302_A_Muscles">

        <Display id="neurons" title="c302_A_Muscles: Membrane potential of a number of neurons" timeScale="1ms" xmin="-100.0" xmax="1100.0" ymin="-52" ymax="-28">

            <Line id="AVBL" quantity="AVBL/0/generic_neuron_iaf_cell/v" scale="1mV" color="#10dbf7" timeScale="1ms" />
            <Line id="AVBR" quantity="AVBR/0/generic_neuron_iaf_cell/v" scale="1mV" color="#0069ec" timeScale="1ms" />
            <Line id="DB1" quantity="DB1/0/generic_neuron_iaf_cell/v" scale="1mV" color="#fb8e52" timeScale="1ms" />
            <Line id="DB2" quantity="DB2/0/generic_neuron_iaf_cell/v" scale="1mV" color="#11faa7" timeScale="1ms" />
            <Line id="DD1" quantity="DD1/0/generic_neuron_iaf_cell/v" scale="1mV" color="#267fb8" timeScale="1ms" />
            <Line id="DD2" quantity="DD2/0/generic_neuron_iaf_cell/v" scale="1mV" color="#16d747" timeScale="1ms" />
            <Line id="PVCL" quantity="PVCL/0/generic_neuron_iaf_cell/v" scale="1mV" color="#b5c3d7" timeScale="1ms" />
            <Line id="PVCR" quantity="PVCR/0/generic_neuron_iaf_cell/v" scale="1mV" color="#9186e9" timeScale="1ms" />
            <Line id="VB1" quantity="VB1/0/generic_neuron_iaf_cell/v" scale="1mV" color="#599bb9" timeScale="1ms" />
            <Line id="VB2" quantity="VB2/0/generic_neuron_iaf_cell/v" scale="1mV" color="#44e97a" timeScale="1ms" />
            <Line id="VD1" quantity="VD1/0/generic_neuron_iaf_cell/v" scale="1mV" color="#e1c016" timeScale="1ms" />
            <Line id="VD2" quantity="VD2/0/generic_neuron_iaf_cell/v" scale="1mV" color="#007844" timeScale="1ms" />

        </Display>

        <Display id="muscles" title="c302_A_Muscles: Membrane potential of a number of muscles" timeScale="1ms" xmin="-100.0" xmax="1100.0" ymin="-52" ymax="-28">

            <Line id="MDL01" quantity="MDL01/0/generic_muscle_iaf_cell/v" scale="1mV" color="#639bbb" timeScale="1ms" />
            <Line id="MDL02" quantity="MDL02/0/generic_muscle_iaf_cell/v" scale="1mV" color="#7aa0e6" timeScale="1ms" />
            <Line id="MDL03" quantity="MDL03/0/generic_muscle_iaf_cell/v" scale="1mV" color="#dff021" timeScale="1ms" />
            <Line id="MDL04" quantity="MDL04/0/generic_muscle_iaf_cell/v" scale="1mV" color="#a60050" timeScale="1ms" />
            <Line id="MDL05" quantity="MDL05/0/generic_muscle_iaf_cell/v" scale="1mV" color="#72d37a" timeScale="1ms" />
            <Line id="MDL06" quantity="MDL06/0/generic_muscle_iaf_cell/v" scale="1mV" color="#1210fe" timeScale="1ms" />
            <Line id="MDL07" quantity="MDL07/0/generic_muscle_iaf_cell/v" scale="1mV" color="#9a2429" timeScale="1ms" />
            <Line id="MDL08" quantity="MDL08/0/generic_muscle_iaf_cell/v" scale="1mV" color="#4cc4bf" timeScale="1ms" />
            <Line id="MDL09" quantity="MDL09/0/generic_muscle_iaf_cell/v" scale="1mV" color="#4c3931" timeScale="1ms" />
            <Line id="MDL10" quantity="MDL10/0/generic_muscle_iaf_cell/v" scale="1mV" color="#e25561" timeScale="1ms" />
            <Line id="MDL11" quantity="MDL11/0/generic_muscle_iaf_cell/v" scale="1mV" color="#b2ddd4" timeScale="1ms" />
            <Line id="MDL12" quantity="MDL12/0/generic_muscle_iaf_cell/v" scale="1mV" color="#e47d8c" timeScale="1ms" />
            <Line id="MDL13" quantity="MDL13/0/generic_muscle_iaf_cell/v" scale="1mV" color="#495b3d" timeScale="1ms" />
            <Line id="MDL14" quantity="MDL14/0/generic_muscle_iaf_cell/v" scale="1mV" color="#88e99a" timeScale="1ms" />
            <Line id="MDL15" quantity="MDL15/0/generic_muscle_iaf_cell/v" scale="1mV" color="#54595a" timeScale="1ms" />
            <Line id="MDL16" quantity="MDL16/0/generic_muscle_iaf_cell/v" scale="1mV" color="#f5b1a7" timeScale="1ms" />
            <Line id="MDL17" quantity="MDL17/0/generic_muscle_iaf_cell/v" scale="1mV" color="#de7200" timeScale="1ms" />
            <Line id="MDL18" quantity="MDL18/0/generic_muscle_iaf_cell/v" scale="1mV" color="#16a9a3" timeScale="1ms" />
            <Line id="MDL19" quantity="MDL19/0/generic_muscle_iaf_cell/v" scale="1mV" color="#7c2886" timeScale="1ms" />
            <Line id="MDL20" quantity="MDL20/0/generic_muscle_iaf_cell/v" scale="1mV" color="#e5cf51" timeScale="1ms" />
            <Line id="MDL21" quantity="MDL21/0/generic_muscle_iaf_cell/v" scale="1mV" color="#c7fd7b" timeScale="1ms" />
            <Line id="MDL22" quantity="MDL22/0/generic_muscle_iaf_cell/v" scale="1mV" color="#8bf7ff" timeScale="1ms" />
            <Line id="MDL23" quantity="MDL23/0/generic_muscle_iaf_cell/v" scale="1mV" color="#2055fa" timeScale="1ms" />
            <Line id="MDL24" quantity="MDL24/0/generic_muscle_iaf_cell/v" scale="1mV" color="#eccd45" timeScale="1ms" />
            <Line id="MDR01" quantity="MDR01/0/generic_muscle_iaf_cell/v" scale="1mV" color="#d7b2c6" timeScale="1ms" />
            <Line id="MDR02" quantity="MDR02/0/generic_muscle_iaf_cell/v" scale="1mV" color="#fa54e1" timeScale="1ms" />
            <Line id="MDR03" quantity="MDR03/0/generic_muscle_iaf_cell/v" scale="1mV" color="#32d412" timeScale="1ms" />
            <Line id="MDR04" quantity="MDR04/0/generic_muscle_iaf_cell/v" scale="1mV" color="#00e021" timeScale="1ms" />
            <Line id="MDR05" quantity="MDR05/0/generic_muscle_iaf_cell/v" scale="1mV" color="#19b32f" timeScale="1ms" />
            <Line id="MDR06" quantity="MDR06/0/generic_muscle_iaf_cell/v" scale="1mV" color="#4d37e8" timeScale="1ms" />
            <Line id="MDR07" quantity="MDR07/0/generic_muscle_iaf_cell/v" scale="1mV" color="#f847ea" timeScale="1ms" />
            <Line id="MDR08" quantity="MDR08/0/generic_muscle_iaf_cell/v" scale="1mV" color="#df00e4" timeScale="1ms" />
            <Line id="MDR09" quantity="MDR09/0/generic_muscle_iaf_cell/v" scale="1mV" color="#af84ea" timeScale="1ms" />
            <Line id="MDR10" quantity="MDR10/0/generic_muscle_iaf_cell/v" scale="1mV" color="#d8a84e" timeScale="1ms" />
            <Line id="MDR11" quantity="MDR11/0/generic_muscle_iaf_cell/v" scale="1mV" color="#79a510" timeScale="1ms" />
            <Line id="MDR12" quantity="MDR12/0/generic_muscle_iaf_cell/v" scale="1mV" color="#64f500" timeScale="1ms" />
            <Line id="MDR13" quantity="MDR13/0/generic_muscle_iaf_cell/v" scale="1mV" color="#3b97de" timeScale="1ms" />
            <Line id="MDR14" quantity="MDR14/0/generic_muscle_iaf_cell/v" scale="1mV" color="#7e942d" timeScale="1ms" />
            <Line id="MDR15" quantity="MDR15/0/generic_muscle_iaf_cell/v" scale="1mV" color="#173692" timeScale="1ms" />
            <Line id="MDR16" quantity="MDR16/0/generic_muscle_iaf_cell/v" scale="1mV" color="#53f448" timeScale="1ms" />
            <Line id="MDR17" quantity="MDR17/0/generic_muscle_iaf_cell/v" scale="1mV" color="#b8cd62" timeScale="1ms" />
            <Line id="MDR18" quantity="MDR18/0/generic_muscle_iaf_cell/v" scale="1mV" color="#b35d28" timeScale="1ms" />
            <Line id="MDR19" quantity="MDR19/0/generic_muscle_iaf_cell/v" scale="1mV" color="#63da6a" timeScale="1ms" />
            <Line id="MDR20" quantity="MDR20/0/generic_muscle_iaf_cell/v" scale="1mV" color="#319ded" timeScale="1ms" />
            <Line id="MDR21" quantity="MDR21/0/generic_muscle_iaf_cell/v" scale="1mV" color="#d8e56a" timeScale="1ms" />
            <Line id="MDR22" quantity="MDR22/0/generic_muscle_iaf_cell/v" scale="1mV" color="#88ba3b" timeScale="1ms" />
            <Line id="MDR23" quantity="MDR23/0/generic_muscle_iaf_cell/v" scale="1mV" color="#006bd9" timeScale="1ms" />
            <Line id="MDR24" quantity="MDR24/0/generic_muscle_iaf_cell/v" scale="1mV" color="#d1c366" timeScale="1ms" />
            <Line id="MVL01" quantity="MVL01/0/generic_muscle_iaf_cell/v" scale="1mV" color="#23d82d" timeScale="1ms" />
            <Line id="MVL02" quantity="MVL02/0/generic_muscle_iaf_cell/v" scale="1mV" color="#1cb282" timeScale="1ms" />
            <Line id="MVL03" quantity="MVL03/0/generic_muscle_iaf_cell/v" scale="1mV" color="#b8e9d9" timeScale="1ms" />
            <Line id="MVL04" quantity="MVL04/0/generic_muscle_iaf_cell/v" scale="1mV" color="#6390ee" timeScale="1ms" />
            <Line id="MVL05" quantity="MVL05/0/generic_muscle_iaf_cell/v" scale="1mV" color="#96ff86" timeScale="1ms" />
            <Line id="MVL06" quantity="MVL06/0/generic_muscle_iaf_cell/v" scale="1mV" color="#cfe2ae" timeScale="1ms" />
            <Line id="MVL07" quantity="MVL07/0/generic_muscle_iaf_cell/v" scale="1mV" color="#b28df7" timeScale="1ms" />
            <Line id="MVL08" quantity="MVL08/0/generic_muscle_iaf_cell/v" scale="1mV" color="#e4f4f5" timeScale="1ms" />
            <Line id="MVL09" quantity="MVL09/0/generic_muscle_iaf_cell/v" scale="1mV" color="#2abbcf" timeScale="1ms" />
            <Line id="MVL10" quantity="MVL10/0/generic_muscle_iaf_cell/v" scale="1mV" color="#56d421" timeScale="1ms" />
            <Line id="MVL11" quantity="MVL11/0/generic_muscle_iaf_cell/v" scale="1mV" color="#9c00a7" timeScale="1ms" />
            <Line id="MVL12" quantity="MVL12/0/generic_muscle_iaf_cell/v" scale="1mV" color="#a425cb" timeScale="1ms" />
            <Line id="MVL13" quantity="MVL13/0/generic_muscle_iaf_cell/v" scale="1mV" color="#bf905f" timeScale="1ms" />
            <Line id="MVL14" quantity="MVL14/0/generic_muscle_iaf_cell/v" scale="1mV" color="#7b569d" timeScale="1ms" />
            <Line id="MVL15" quantity="MVL15/0/generic_muscle_iaf_cell/v" scale="1mV" color="#301b70" timeScale="1ms" />
            <Line id="MVL16" quantity="MVL16/0/generic_muscle_iaf_cell/v" scale="1mV" color="#25d762" timeScale="1ms" />
            <Line id="MVL17" quantity="MVL17/0/generic_muscle_iaf_cell/v" scale="1mV" color="#e000c8" timeScale="1ms" />
            <Line id="MVL18" quantity="MVL18/0/generic_muscle_iaf_cell/v" scale="1mV" color="#67ad61" timeScale="1ms" />
            <Line id="MVL19" quantity="MVL19/0/generic_muscle_iaf_cell/v" scale="1mV" color="#a71819" timeScale="1ms" />
            <Line id="MVL20" quantity="MVL20/0/generic_muscle_iaf_cell/v" scale="1mV" color="#12bbcb" timeScale="1ms" />
            <Line id="MVL21" quantity="MVL21/0/generic_muscle_iaf_cell/v" scale="1mV" color="#a65750" timeScale="1ms" />
            <Line id="MVL22" quantity="MVL22/0/generic_muscle_iaf_cell/v" scale="1mV" color="#3cb054" timeScale="1ms" />
            <Line id="MVL23" quantity="MVL23/0/generic_muscle_iaf_cell/v" scale="1mV" color="#00b22d" timeScale="1ms" />
            <Line id="MVR01" quantity="MVR01/0/generic_muscle_iaf_cell/v" scale="1mV" color="#cbe0b2" timeScale="1ms" />
            <Line id="MVR02" quantity="MVR02/0/generic_muscle_iaf_cell/v" scale="1mV" color="#1e4ae3" timeScale="1ms" />
            <Line id="MVR03" quantity="MVR03/0/generic_muscle_iaf_cell/v" scale="1mV" color="#f1e7e2" timeScale="1ms" />
            <Line id="MVR04" quantity="MVR04/0/generic_muscle_iaf_cell/v" scale="1mV" color="#59b5d8" timeScale="1ms" />
            <Line id="MVR05" quantity="MVR05/0/generic_muscle_iaf_cell/v" scale="1mV" color="#afeac6" timeScale="1ms" />
            <Line id="MVR06" quantity="MVR06/0/generic_muscle_iaf_cell/v" scale="1mV" color="#6331dd" timeScale="1ms" />
            <Line id="MVR07" quantity="MVR07/0/generic_muscle_iaf_cell/v" scale="1mV" color="#4e155f" timeScale="1ms" />
            <Line id="MVR08" quantity="MVR08/0/generic_muscle_iaf_cell/v" scale="1mV" color="#61dbb8" timeScale="1ms" />
            <Line id="MVR09" quantity="MVR09/0/generic_muscle_iaf_cell/v" scale="1mV" color="#c0191a" timeScale="1ms" />
            <Line id="MVR10" quantity="MVR10/0/generic_muscle_iaf_cell/v" scale="1mV" color="#549f72" timeScale="1ms" />
            <Line id="MVR11" quantity="MVR11/0/generic_muscle_iaf_cell/v" scale="1mV" color="#195a33" timeScale="1ms" />
            <Line id="MVR12" quantity="MVR12/0/generic_muscle_iaf_cell/v" scale="1mV" color="#b85f9a" timeScale="1ms" />
            <Line id="MVR13" quantity="MVR13/0/generic_muscle_iaf_cell/v" scale="1mV" color="#15cadb" timeScale="1ms" />
            <Line id="MVR14" quantity="MVR14/0/generic_muscle_iaf_cell/v" scale="1mV" color="#27b063" timeScale="1ms" />
            <Line id="MVR15" quantity="MVR15/0/generic_muscle_iaf_cell/v" scale="1mV" color="#fb5356" timeScale="1ms" />
            <Line id="MVR16" quantity="MVR16/0/generic_muscle_iaf_cell/v" scale="1mV" color="#cfefa8" timeScale="1ms" />
            <Line id="MVR17" quantity="MVR17/0/generic_muscle_iaf_cell/v" scale="1mV" color="#13585a" timeScale="1ms" />
            <Line id="MVR18" quantity="MVR18/0/generic_muscle_iaf_cell/v" scale="1mV" color="#d74ec8" timeScale="1ms" />
            <Line id="MVR19" quantity="MVR19/0/generic_muscle_iaf_cell/v" scale="1mV" color="#30cb3c" timeScale="1ms" />
            <Line id="MVR20" quantity="MVR20/0/generic_muscle_iaf_cell/v" scale="1mV" color="#7836d8" timeScale="1ms" />
            <Line id="MVR21" quantity="MVR21/0/generic_muscle_iaf_cell/v" scale="1mV" color="#9f9432" timeScale="1ms" />
            <Line id="MVR22" quantity="MVR22/0/generic_muscle_iaf_cell/v" scale="1mV" color="#b0f37d" timeScale="1ms" />
            <Line id="MVR23" quantity="MVR23/0/generic_muscle_iaf_cell/v" scale="1mV" color="#940050" timeScale="1ms" />
            <Line id="MVR24" quantity="MVR24/0/generic_muscle_iaf_cell/v" scale="1mV" color="#c57531" timeScale="1ms" />

        </Display>

        <OutputFile id="neurons_v" fileName="c302_A_Muscles.dat">
            <OutputColumn id="AS1_v" quantity="AS1/0/generic_neuron_iaf_cell/v" />
            <OutputColumn id="AS10_v" quantity="AS10/0/generic_neuron_iaf_cell/v" />
            <OutputColumn id="AS11_v" quantity="AS11/0/generic_neuron_iaf_cell/v" />
            <OutputColumn id="AS2_v" quantity="AS2/0/generic_neuron_iaf_cell/v" />
            <OutputColumn id="AS3_v" quantity="AS3/0/generic_neuron_iaf_cell/v" />
            <OutputColumn id="AS4_v" quantity="AS4/0/generic_neuron_iaf_cell/v" />
            <OutputColumn id="AS5_v" quantity="AS5/0/generic_neuron_iaf_cell/v" />
            <OutputColumn id="AS6_v" quantity="AS6/0/generic_neuron_iaf_cell/v" />
            <OutputColumn id="AS7_v" quantity="AS7/0/generic_neuron_iaf_cell/v" />
            <OutputColumn id="AS8_v" quantity="AS8/0/generic_neuron_iaf_cell/v" />
            <OutputColumn id="AS9_v" quantity="AS9/0/generic_neuron_iaf_cell/v" />
            <OutputColumn id="AVAL_v" quantity="AVAL/0/generic_neuron_iaf_cell/v" />
            <OutputColumn id="AVAR_v" quantity="AVAR/0/generic_neuron_iaf_cell/v" />
            <OutputColumn id="AVBL_v" quantity="AVBL/0/generic_neuron_iaf_cell/v" />
            <OutputColumn id="AVBR_v" quantity="AVBR/0/generic_neuron_iaf_cell/v" />
            <OutputColumn id="AVDL_v" quantity="AVDL/0/generic_neuron_iaf_cell/v" />
            <OutputColumn id="AVDR_v" quantity="AVDR/0/generic_neuron_iaf_cell/v" />
            <OutputColumn id="AVFL_v" quantity="AVFL/0/generic_neuron_iaf_cell/v" />
            <OutputColumn id="AVFR_v" quantity="AVFR/0/generic_neuron_iaf_cell/v" />
            <OutputColumn id="AVKR_v" quantity="AVKR/0/generic_neuron_iaf_cell/v" />
            <OutputColumn id="AVL_v" quantity="AVL/0/generic_neuron_iaf_cell/v" />
            <OutputColumn id="CEPVL_v" quantity="CEPVL/0/generic_neuron_iaf_cell/v" />
            <OutputColumn id="CEPVR_v" quantity="CEPVR/0/generic_neuron_iaf_cell/v" />
            <OutputColumn id="DA1_v" quantity="DA1/0/generic_neuron_iaf_cell/v" />
            <OutputColumn id="DA2_v" quantity="DA2/0/generic_neuron_iaf_cell/v" />
            <OutputColumn id="DA3_v" quantity="DA3/0/generic_neuron_iaf_cell/v" />
            <OutputColumn id="DA4_v" quantity="DA4/0/generic_neuron_iaf_cell/v" />
            <OutputColumn id="DA5_v" quantity="DA5/0/generic_neuron_iaf_cell/v" />
            <OutputColumn id="DA6_v" quantity="DA6/0/generic_neuron_iaf_cell/v" />
            <OutputColumn id="DA7_v" quantity="DA7/0/generic_neuron_iaf_cell/v" />
            <OutputColumn id="DA8_v" quantity="DA8/0/generic_neuron_iaf_cell/v" />
            <OutputColumn id="DA9_v" quantity="DA9/0/generic_neuron_iaf_cell/v" />
            <OutputColumn id="DB1_v" quantity="DB1/0/generic_neuron_iaf_cell/v" />
            <OutputColumn id="DB2_v" quantity="DB2/0/generic_neuron_iaf_cell/v" />
            <OutputColumn id="DB3_v" quantity="DB3/0/generic_neuron_iaf_cell/v" />
            <OutputColumn id="DB4_v" quantity="DB4/0/generic_neuron_iaf_cell/v" />
            <OutputColumn id="DB5_v" quantity="DB5/0/generic_neuron_iaf_cell/v" />
            <OutputColumn id="DB6_v" quantity="DB6/0/generic_neuron_iaf_cell/v" />
            <OutputColumn id="DB7_v" quantity="DB7/0/generic_neuron_iaf_cell/v" />
            <OutputColumn id="DD1_v" quantity="DD1/0/generic_neuron_iaf_cell/v" />
            <OutputColumn id="DD2_v" quantity="DD2/0/generic_neuron_iaf_cell/v" />
            <OutputColumn id="DD3_v" quantity="DD3/0/generic_neuron_iaf_cell/v" />
            <OutputColumn id="DD4_v" quantity="DD4/0/generic_neuron_iaf_cell/v" />
            <OutputColumn id="DD5_v" quantity="DD5/0/generic_neuron_iaf_cell/v" />
            <OutputColumn id="DD6_v" quantity="DD6/0/generic_neuron_iaf_cell/v" />
            <OutputColumn id="DVB_v" quantity="DVB/0/generic_neuron_iaf_cell/v" />
            <OutputColumn id="HSNL_v" quantity="HSNL/0/generic_neuron_iaf_cell/v" />
            <OutputColumn id="HSNR_v" quantity="HSNR/0/generic_neuron_iaf_cell/v" />
            <OutputColumn id="IL1DL_v" quantity="IL1DL/0/generic_neuron_iaf_cell/v" />
            <OutputColumn id="IL1DR_v" quantity="IL1DR/0/generic_neuron_iaf_cell/v" />
            <OutputColumn id="IL1L_v" quantity="IL1L/0/generic_neuron_iaf_cell/v" />
            <OutputColumn id="IL1R_v" quantity="IL1R/0/generic_neuron_iaf_cell/v" />
            <OutputColumn id="IL1VL_v" quantity="IL1VL/0/generic_neuron_iaf_cell/v" />
            <OutputColumn id="IL1VR_v" quantity="IL1VR/0/generic_neuron_iaf_cell/v" />
            <OutputColumn id="PDA_v" quantity="PDA/0/generic_neuron_iaf_cell/v" />
            <OutputColumn id="PDB_v" quantity="PDB/0/generic_neuron_iaf_cell/v" />
            <OutputColumn id="PVCL_v" quantity="PVCL/0/generic_neuron_iaf_cell/v" />
            <OutputColumn id="PVCR_v" quantity="PVCR/0/generic_neuron_iaf_cell/v" />
            <OutputColumn id="PVNL_v" quantity="PVNL/0/generic_neuron_iaf_cell/v" />
            <OutputColumn id="PVNR_v" quantity="PVNR/0/generic_neuron_iaf_cell/v" />
            <OutputColumn id="RID_v" quantity="RID/0/generic_neuron_iaf_cell/v" />
            <OutputColumn id="RIML_v" quantity="RIML/0/generic_neuron_iaf_cell/v" />
            <OutputColumn id="RIMR_v" quantity="RIMR/0/generic_neuron_iaf_cell/v" />
            <OutputColumn id="RIVL_v" quantity="RIVL/0/generic_neuron_iaf_cell/v" />
            <OutputColumn id="RIVR_v" quantity="RIVR/0/generic_neuron_iaf_cell/v" />
            <OutputColumn id="RMDDL_v" quantity="RMDDL/0/generic_neuron_iaf_cell/v" />
            <OutputColumn id="RMDDR_v" quantity="RMDDR/0/generic_neuron_iaf_cell/v" />
            <OutputColumn id="RMDL_v" quantity="RMDL/0/generic_neuron_iaf_cell/v" />
            <OutputColumn id="RMDR_v" quantity="RMDR/0/generic_neuron_iaf_cell/v" />
            <OutputColumn id="RMDVL_v" quantity="RMDVL/0/generic_neuron_iaf_cell/v" />
            <OutputColumn id="RMDVR_v" quantity="RMDVR/0/generic_neuron_iaf_cell/v" />
            <OutputColumn id="RMED_v" quantity="RMED/0/generic_neuron_iaf_cell/v" />
            <OutputColumn id="RMEL_v" quantity="RMEL/0/generic_neuron_iaf_cell/v" />
            <OutputColumn id="RMER_v" quantity="RMER/0/generic_neuron_iaf_cell/v" />
            <OutputColumn id="RMEV_v" quantity="RMEV/0/generic_neuron_iaf_cell/v" />
            <OutputColumn id="RMFL_v" quantity="RMFL/0/generic_neuron_iaf_cell/v" />
            <OutputColumn id="RMGL_v" quantity="RMGL/0/generic_neuron_iaf_cell/v" />
            <OutputColumn id="RMGR_v" quantity="RMGR/0/generic_neuron_iaf_cell/v" />
            <OutputColumn id="RMHL_v" quantity="RMHL/0/generic_neuron_iaf_cell/v" />
            <OutputColumn id="RMHR_v" quantity="RMHR/0/generic_neuron_iaf_cell/v" />
            <OutputColumn id="SMBDL_v" quantity="SMBDL/0/generic_neuron_iaf_cell/v" />
            <OutputColumn id="SMBDR_v" quantity="SMBDR/0/generic_neuron_iaf_cell/v" />
            <OutputColumn id="SMBVL_v" quantity="SMBVL/0/generic_neuron_iaf_cell/v" />
            <OutputColumn id="SMBVR_v" quantity="SMBVR/0/generic_neuron_iaf_cell/v" />
            <OutputColumn id="SMDDL_v" quantity="SMDDL/0/generic_neuron_iaf_cell/v" />
            <OutputColumn id="SMDDR_v" quantity="SMDDR/0/generic_neuron_iaf_cell/v" />
            <OutputColumn id="SMDVL_v" quantity="SMDVL/0/generic_neuron_iaf_cell/v" />
            <OutputColumn id="SMDVR_v" quantity="SMDVR/0/generic_neuron_iaf_cell/v" />
            <OutputColumn id="URADL_v" quantity="URADL/0/generic_neuron_iaf_cell/v" />
            <OutputColumn id="URADR_v" quantity="URADR/0/generic_neuron_iaf_cell/v" />
            <OutputColumn id="URAVL_v" quantity="URAVL/0/generic_neuron_iaf_cell/v" />
            <OutputColumn id="URAVR_v" quantity="URAVR/0/generic_neuron_iaf_cell/v" />
            <OutputColumn id="VA1_v" quantity="VA1/0/generic_neuron_iaf_cell/v" />
            <OutputColumn id="VA10_v" quantity="VA10/0/generic_neuron_iaf_cell/v" />
            <OutputColumn id="VA11_v" quantity="VA11/0/generic_neuron_iaf_cell/v" />
            <OutputColumn id="VA12_v" quantity="VA12/0/generic_neuron_iaf_cell/v" />
            <OutputColumn id="VA2_v" quantity="VA2/0/generic_neuron_iaf_cell/v" />
            <OutputColumn id="VA3_v" quantity="VA3/0/generic_neuron_iaf_cell/v" />
            <OutputColumn id="VA4_v" quantity="VA4/0/generic_neuron_iaf_cell/v" />
            <OutputColumn id="VA5_v" quantity="VA5/0/generic_neuron_iaf_cell/v" />
            <OutputColumn id="VA6_v" quantity="VA6/0/generic_neuron_iaf_cell/v" />
            <OutputColumn id="VA7_v" quantity="VA7/0/generic_neuron_iaf_cell/v" />
            <OutputColumn id="VA8_v" quantity="VA8/0/generic_neuron_iaf_cell/v" />
            <OutputColumn id="VA9_v" quantity="VA9/0/generic_neuron_iaf_cell/v" />
            <OutputColumn id="VB1_v" quantity="VB1/0/generic_neuron_iaf_cell/v" />
            <OutputColumn id="VB10_v" quantity="VB10/0/generic_neuron_iaf_cell/v" />
            <OutputColumn id="VB11_v" quantity="VB11/0/generic_neuron_iaf_cell/v" />
            <OutputColumn id="VB2_v" quantity="VB2/0/generic_neuron_iaf_cell/v" />
            <OutputColumn id="VB3_v" quantity="VB3/0/generic_neuron_iaf_cell/v" />
            <OutputColumn id="VB4_v" quantity="VB4/0/generic_neuron_iaf_cell/v" />
            <OutputColumn id="VB5_v" quantity="VB5/0/generic_neuron_iaf_cell/v" />
            <OutputColumn id="VB6_v" quantity="VB6/0/generic_neuron_iaf_cell/v" />
            <OutputColumn id="VB7_v" quantity="VB7/0/generic_neuron_iaf_cell/v" />
            <OutputColumn id="VB8_v" quantity="VB8/0/generic_neuron_iaf_cell/v" />
            <OutputColumn id="VB9_v" quantity="VB9/0/generic_neuron_iaf_cell/v" />
            <OutputColumn id="VC1_v" quantity="VC1/0/generic_neuron_iaf_cell/v" />
            <OutputColumn id="VC2_v" quantity="VC2/0/generic_neuron_iaf_cell/v" />
            <OutputColumn id="VC3_v" quantity="VC3/0/generic_neuron_iaf_cell/v" />
            <OutputColumn id="VC4_v" quantity="VC4/0/generic_neuron_iaf_cell/v" />
            <OutputColumn id="VC5_v" quantity="VC5/0/generic_neuron_iaf_cell/v" />
            <OutputColumn id="VC6_v" quantity="VC6/0/generic_neuron_iaf_cell/v" />
            <OutputColumn id="VD1_v" quantity="VD1/0/generic_neuron_iaf_cell/v" />
            <OutputColumn id="VD10_v" quantity="VD10/0/generic_neuron_iaf_cell/v" />
            <OutputColumn id="VD11_v" quantity="VD11/0/generic_neuron_iaf_cell/v" />
            <OutputColumn id="VD12_v" quantity="VD12/0/generic_neuron_iaf_cell/v" />
            <OutputColumn id="VD13_v" quantity="VD13/0/generic_neuron_iaf_cell/v" />
            <OutputColumn id="VD2_v" quantity="VD2/0/generic_neuron_iaf_cell/v" />
            <OutputColumn id="VD3_v" quantity="VD3/0/generic_neuron_iaf_cell/v" />
            <OutputColumn id="VD4_v" quantity="VD4/0/generic_neuron_iaf_cell/v" />
            <OutputColumn id="VD5_v" quantity="VD5/0/generic_neuron_iaf_cell/v" />
            <OutputColumn id="VD6_v" quantity="VD6/0/generic_neuron_iaf_cell/v" />
            <OutputColumn id="VD7_v" quantity="VD7/0/generic_neuron_iaf_cell/v" />
            <OutputColumn id="VD8_v" quantity="VD8/0/generic_neuron_iaf_cell/v" />
            <OutputColumn id="VD9_v" quantity="VD9/0/generic_neuron_iaf_cell/v" />
        </OutputFile>

        <OutputFile id="muscles_v" fileName="c302_A_Muscles.muscles.dat">
            <OutputColumn id="MDL01_v" quantity="MDL01/0/generic_muscle_iaf_cell/v" />
            <OutputColumn id="MDL02_v" quantity="MDL02/0/generic_muscle_iaf_cell/v" />
            <OutputColumn id="MDL03_v" quantity="MDL03/0/generic_muscle_iaf_cell/v" />
            <OutputColumn id="MDL04_v" quantity="MDL04/0/generic_muscle_iaf_cell/v" />
            <OutputColumn id="MDL05_v" quantity="MDL05/0/generic_muscle_iaf_cell/v" />
            <OutputColumn id="MDL06_v" quantity="MDL06/0/generic_muscle_iaf_cell/v" />
            <OutputColumn id="MDL07_v" quantity="MDL07/0/generic_muscle_iaf_cell/v" />
            <OutputColumn id="MDL08_v" quantity="MDL08/0/generic_muscle_iaf_cell/v" />
            <OutputColumn id="MDL09_v" quantity="MDL09/0/generic_muscle_iaf_cell/v" />
            <OutputColumn id="MDL10_v" quantity="MDL10/0/generic_muscle_iaf_cell/v" />
            <OutputColumn id="MDL11_v" quantity="MDL11/0/generic_muscle_iaf_cell/v" />
            <OutputColumn id="MDL12_v" quantity="MDL12/0/generic_muscle_iaf_cell/v" />
            <OutputColumn id="MDL13_v" quantity="MDL13/0/generic_muscle_iaf_cell/v" />
            <OutputColumn id="MDL14_v" quantity="MDL14/0/generic_muscle_iaf_cell/v" />
            <OutputColumn id="MDL15_v" quantity="MDL15/0/generic_muscle_iaf_cell/v" />
            <OutputColumn id="MDL16_v" quantity="MDL16/0/generic_muscle_iaf_cell/v" />
            <OutputColumn id="MDL17_v" quantity="MDL17/0/generic_muscle_iaf_cell/v" />
            <OutputColumn id="MDL18_v" quantity="MDL18/0/generic_muscle_iaf_cell/v" />
            <OutputColumn id="MDL19_v" quantity="MDL19/0/generic_muscle_iaf_cell/v" />
            <OutputColumn id="MDL20_v" quantity="MDL20/0/generic_muscle_iaf_cell/v" />
            <OutputColumn id="MDL21_v" quantity="MDL21/0/generic_muscle_iaf_cell/v" />
            <OutputColumn id="MDL22_v" quantity="MDL22/0/generic_muscle_iaf_cell/v" />
            <OutputColumn id="MDL23_v" quantity="MDL23/0/generic_muscle_iaf_cell/v" />
            <OutputColumn id="MDL24_v" quantity="MDL24/0/generic_muscle_iaf_cell/v" />
            <OutputColumn id="MDR01_v" quantity="MDR01/0/generic_muscle_iaf_cell/v" />
            <OutputColumn id="MDR02_v" quantity="MDR02/0/generic_muscle_iaf_cell/v" />
            <OutputColumn id="MDR03_v" quantity="MDR03/0/generic_muscle_iaf_cell/v" />
            <OutputColumn id="MDR04_v" quantity="MDR04/0/generic_muscle_iaf_cell/v" />
            <OutputColumn id="MDR05_v" quantity="MDR05/0/generic_muscle_iaf_cell/v" />
            <OutputColumn id="MDR06_v" quantity="MDR06/0/generic_muscle_iaf_cell/v" />
            <OutputColumn id="MDR07_v" quantity="MDR07/0/generic_muscle_iaf_cell/v" />
            <OutputColumn id="MDR08_v" quantity="MDR08/0/generic_muscle_iaf_cell/v" />
            <OutputColumn id="MDR09_v" quantity="MDR09/0/generic_muscle_iaf_cell/v" />
            <OutputColumn id="MDR10_v" quantity="MDR10/0/generic_muscle_iaf_cell/v" />
            <OutputColumn id="MDR11_v" quantity="MDR11/0/generic_muscle_iaf_cell/v" />
            <OutputColumn id="MDR12_v" quantity="MDR12/0/generic_muscle_iaf_cell/v" />
            <OutputColumn id="MDR13_v" quantity="MDR13/0/generic_muscle_iaf_cell/v" />
            <OutputColumn id="MDR14_v" quantity="MDR14/0/generic_muscle_iaf_cell/v" />
            <OutputColumn id="MDR15_v" quantity="MDR15/0/generic_muscle_iaf_cell/v" />
            <OutputColumn id="MDR16_v" quantity="MDR16/0/generic_muscle_iaf_cell/v" />
            <OutputColumn id="MDR17_v" quantity="MDR17/0/generic_muscle_iaf_cell/v" />
            <OutputColumn id="MDR18_v" quantity="MDR18/0/generic_muscle_iaf_cell/v" />
            <OutputColumn id="MDR19_v" quantity="MDR19/0/generic_muscle_iaf_cell/v" />
            <OutputColumn id="MDR20_v" quantity="MDR20/0/generic_muscle_iaf_cell/v" />
            <OutputColumn id="MDR21_v" quantity="MDR21/0/generic_muscle_iaf_cell/v" />
            <OutputColumn id="MDR22_v" quantity="MDR22/0/generic_muscle_iaf_cell/v" />
            <OutputColumn id="MDR23_v" quantity="MDR23/0/generic_muscle_iaf_cell/v" />
            <OutputColumn id="MDR24_v" quantity="MDR24/0/generic_muscle_iaf_cell/v" />
            <OutputColumn id="MVL01_v" quantity="MVL01/0/generic_muscle_iaf_cell/v" />
            <OutputColumn id="MVL02_v" quantity="MVL02/0/generic_muscle_iaf_cell/v" />
            <OutputColumn id="MVL03_v" quantity="MVL03/0/generic_muscle_iaf_cell/v" />
            <OutputColumn id="MVL04_v" quantity="MVL04/0/generic_muscle_iaf_cell/v" />
            <OutputColumn id="MVL05_v" quantity="MVL05/0/generic_muscle_iaf_cell/v" />
            <OutputColumn id="MVL06_v" quantity="MVL06/0/generic_muscle_iaf_cell/v" />
            <OutputColumn id="MVL07_v" quantity="MVL07/0/generic_muscle_iaf_cell/v" />
            <OutputColumn id="MVL08_v" quantity="MVL08/0/generic_muscle_iaf_cell/v" />
            <OutputColumn id="MVL09_v" quantity="MVL09/0/generic_muscle_iaf_cell/v" />
            <OutputColumn id="MVL10_v" quantity="MVL10/0/generic_muscle_iaf_cell/v" />
            <OutputColumn id="MVL11_v" quantity="MVL11/0/generic_muscle_iaf_cell/v" />
            <OutputColumn id="MVL12_v" quantity="MVL12/0/generic_muscle_iaf_cell/v" />
            <OutputColumn id="MVL13_v" quantity="MVL13/0/generic_muscle_iaf_cell/v" />
            <OutputColumn id="MVL14_v" quantity="MVL14/0/generic_muscle_iaf_cell/v" />
            <OutputColumn id="MVL15_v" quantity="MVL15/0/generic_muscle_iaf_cell/v" />
            <OutputColumn id="MVL16_v" quantity="MVL16/0/generic_muscle_iaf_cell/v" />
            <OutputColumn id="MVL17_v" quantity="MVL17/0/generic_muscle_iaf_cell/v" />
            <OutputColumn id="MVL18_v" quantity="MVL18/0/generic_muscle_iaf_cell/v" />
            <OutputColumn id="MVL19_v" quantity="MVL19/0/generic_muscle_iaf_cell/v" />
            <OutputColumn id="MVL20_v" quantity="MVL20/0/generic_muscle_iaf_cell/v" />
            <OutputColumn id="MVL21_v" quantity="MVL21/0/generic_muscle_iaf_cell/v" />
            <OutputColumn id="MVL22_v" quantity="MVL22/0/generic_muscle_iaf_cell/v" />
            <OutputColumn id="MVL23_v" quantity="MVL23/0/generic_muscle_iaf_cell/v" />
            <OutputColumn id="MVR01_v" quantity="MVR01/0/generic_muscle_iaf_cell/v" />
            <OutputColumn id="MVR02_v" quantity="MVR02/0/generic_muscle_iaf_cell/v" />
            <OutputColumn id="MVR03_v" quantity="MVR03/0/generic_muscle_iaf_cell/v" />
            <OutputColumn id="MVR04_v" quantity="MVR04/0/generic_muscle_iaf_cell/v" />
            <OutputColumn id="MVR05_v" quantity="MVR05/0/generic_muscle_iaf_cell/v" />
            <OutputColumn id="MVR06_v" quantity="MVR06/0/generic_muscle_iaf_cell/v" />
            <OutputColumn id="MVR07_v" quantity="MVR07/0/generic_muscle_iaf_cell/v" />
            <OutputColumn id="MVR08_v" quantity="MVR08/0/generic_muscle_iaf_cell/v" />
            <OutputColumn id="MVR09_v" quantity="MVR09/0/generic_muscle_iaf_cell/v" />
            <OutputColumn id="MVR10_v" quantity="MVR10/0/generic_muscle_iaf_cell/v" />
            <OutputColumn id="MVR11_v" quantity="MVR11/0/generic_muscle_iaf_cell/v" />
            <OutputColumn id="MVR12_v" quantity="MVR12/0/generic_muscle_iaf_cell/v" />
            <OutputColumn id="MVR13_v" quantity="MVR13/0/generic_muscle_iaf_cell/v" />
            <OutputColumn id="MVR14_v" quantity="MVR14/0/generic_muscle_iaf_cell/v" />
            <OutputColumn id="MVR15_v" quantity="MVR15/0/generic_muscle_iaf_cell/v" />
            <OutputColumn id="MVR16_v" quantity="MVR16/0/generic_muscle_iaf_cell/v" />
            <OutputColumn id="MVR17_v" quantity="MVR17/0/generic_muscle_iaf_cell/v" />
            <OutputColumn id="MVR18_v" quantity="MVR18/0/generic_muscle_iaf_cell/v" />
            <OutputColumn id="MVR19_v" quantity="MVR19/0/generic_muscle_iaf_cell/v" />
            <OutputColumn id="MVR20_v" quantity="MVR20/0/generic_muscle_iaf_cell/v" />
            <OutputColumn id="MVR21_v" quantity="MVR21/0/generic_muscle_iaf_cell/v" />
            <OutputColumn id="MVR22_v" quantity="MVR22/0/generic_muscle_iaf_cell/v" />
            <OutputColumn id="MVR23_v" quantity="MVR23/0/generic_muscle_iaf_cell/v" />
            <OutputColumn id="MVR24_v" quantity="MVR24/0/generic_muscle_iaf_cell/v" />
        </OutputFile>
    </Simulation>

</Lems>
